! FEMagent PR11 ANSYS Golden Path V1
! Explicit Golden Path convention: length=m, time=s
/PREP7
ET,1,LINK180
MP,EX,1,10000
MP,DENS,1,100
SECTYPE,1,LINK
SECDATA,0.01
N,1,0,0,0
N,2,1,0,0
TYPE,1
MAT,1
SECNUM,1
E,1,2
D,1,ALL,0
D,2,UY,0
D,2,UZ,0
FINISH
/SOLU
ANTYPE,TRANS
TRNOPT,FULL
LUMPM,ON
AUTOTS,OFF
DELTIM,0.05
OUTRES,NSOL,ALL
TIME,1.0
SOLVE
FINISH
/EXIT,NOSAVE
